[
    (2 L^3 - 11 L^2*x + 18 L*x^2 - 9*x^3)/(2 L^3);
    (18 L^2*x - 45 L*x^2 + 27*x^3)/(2 L^3);
    (-9 L^2*x + 36 L*x^2 - 27*x^3)/(2 L^3);
    (2 L^2*x + (-9 L*x^2) - (-9*x^3))/(2 L^3)
]
Nl(x, L1) := [
    (2*L1^3 - 11*L1^2*x + 18*L1*x^2 - 9*x^3)/(2*L1^3);
    (18*L1^2*x - 45*L1*x^2 + 27*x^3)/(2*L1^3);
    (-9*L1^2*x + 36*L1*x^2 - 27*x^3)/(2*L1^3);
    (2*L1^2*x + (-9*L1*x^2) - (-9*x^3))/(2*L1^3)
]
Ne(x, L2) := [1 - x/L2, x/L2]
Nl = ƒ(any1, any1) → [Unitless]
d/dx(Ne(x, L2)) → [-1/L2, 1/L2]
dNe(x, L2) := d/dx(Ne(x, L2))
d/dx(Nl(x, L1)) → [
    -(11*L1^2 - 36*L1*x + 27*x^2)/(2*L1^3);
    (18*L1^2 - 90*L1*x + 81*x^2)/(2*L1^3);
    -(9*L1^2 - 72*L1*x + 81*x^2)/(2*L1^3);
    (2*L1^2 - 18*L1*x + 27*x^2)/(2*L1^3)
]
dN(x, L1) := d/dx(Nl(x, L1)) → [
    -(11*L1^2 - 36*L1*x + 27*x^2)/(2*L1^3);
    (18*L1^2 - 90*L1*x + 81*x^2)/(2*L1^3);
    -(9*L1^2 - 72*L1*x + 81*x^2)/(2*L1^3);
    (2*L1^2 - 18*L1*x + 27*x^2)/(2*L1^3)
]
Nl(x, L1)*transpose(dN(x, L1))  # error: The symbolic result returned is too large to display, but it can be used in subsequent calculations if assigned to a function or variable.
integral(Nl(x, L1)*transpose(dN(x, L1)), x = 0 .. L1) → [
    -1/2, 57/80, -3/10, 7/80;
    -57/80, 0, 81/80, -3/10;
    3/10, -81/80, 0, 57/80;
    -7/80, 3/10, -57/80, 1/2
]
integral(transpose(Ne(x, L2))*dNe(x, L2), x = 0 .. L2) → [-1/2, 1/2; -1/2, 1/2]
integral(Nl(x, L1), x = 0 .. L1) → [L1/8; 3*L1/8; 3*L1/8; L1/8]
integral(transpose(Ne(x, L2)), x = 0 .. L2) → [L2/2; L2/2]
integral(dN(x, L1)*transpose(dN(x, L1)), x = 0 .. L1) → [
    37/(10*L1), -189/(40*L1), 27/(20*L1), -13/(40*L1);
    -189/(40*L1), 54/(5*L1), -297/(40*L1), 27/(20*L1);
    27/(20*L1), -297/(40*L1), 54/(5*L1), -189/(40*L1);
    -13/(40*L1), 27/(20*L1), -189/(40*L1), 37/(10*L1)
]
integral(transpose(dNe(x, L2))*dNe(x, L2), x = 0 .. L2) → [1/L2, -1/L2; -1/L2, 1/L2]
integral(Nl(x, L1)*transpose(Nl(x, L1)), x = 0 .. L1) → [
    8*L1/105, 33*L1/560, -3*L1/140, 19*L1/1680;
    33*L1/560, 27*L1/70, -27*L1/560, -3*L1/140;
    -3*L1/140, -27*L1/560, 27*L1/70, 33*L1/560;
    19*L1/1680, -3*L1/140, 33*L1/560, 8*L1/105
]
integral(transpose(Ne(x, L2))*Ne(x, L2), x = 0 .. L2) → [L2/3, L2/6; L2/6, L2/3]
Nl(x, L1)*transpose(dN(x, L1))  # error
dN1(X, L1)
