N(x, L) := [1 - x/L, x/L]
N(x, L) := [(18*L^2*x - 45*L*x^2 + 27*x^3)/(2*L^3), (-9*L^2*x + 36*L*x^2 - 27*x^3)/(2*L^3), (2*L^3 - 11*L^2*x + 18*L*x^2 - 9*x^3)/(2*L^3), (2*L^2*x - 9*L*x^2 + 9*x^3)/(2*L^3)]
Nt(x, L) := transpose(N(x, L))
Nt(x, L) → [
    (18*L^2*x - 45*L*x^2 + 27*x^3)/(2*L^3);
    -(9*L^2*x - 36*L*x^2 + 27*x^3)/(2*L^3);
    (2*L^3 - 11*L^2*x + 18*L*x^2 - 9*x^3)/(2*L^3);
    (2*L^2*x - 9*L*x^2 + 9*x^3)/(2*L^3)
]
M1(x, L) := -3*integral(d/dx(Nt(x, L))*(d/dx(N(x, L))), x = 0 .. L) → [
    -162/(5*L), 891/(40*L), 567/(40*L), -81/(20*L);
    891/(40*L), -162/(5*L), -81/(20*L), 567/(40*L);
    567/(40*L), -81/(20*L), -111/(10*L), 39/(40*L);
    -81/(20*L), 567/(40*L), 39/(40*L), -111/(10*L)
]
M2(x, L) := -5*integral(Nt(x, L)*N(x, L), x = 0 .. L) → [
    -27*L/14, 27*L/112, -33*L/112, 3*L/28;
    27*L/112, -27*L/14, 3*L/28, -33*L/112;
    -33*L/112, 3*L/28, -8*L/21, -19*L/336;
    3*L/28, -33*L/112, -19*L/336, -8*L/21
]
M3(x, L) := 10*integral(Nt(x, L), x = 0 .. L) → [15*L/4; 15*L/4; 5*L/4; 5*L/4]
M(x, L) := M1(x, L) + M2(x, L)
M3(x, L) → [15*L/4; 15*L/4; 5*L/4; 5*L/4]
M(x, L) → [
    -27*L/14 - 162/(5*L), 27*L/112 + 891/(40*L), 567/(40*L) - 33*L/112, 3*L/28 - 81/(20*L);
    27*L/112 + 891/(40*L), -27*L/14 - 162/(5*L), 3*L/28 - 81/(20*L), 567/(40*L) - 33*L/112;
    567/(40*L) - 33*L/112, 3*L/28 - 81/(20*L), -8*L/21 - 111/(10*L), 39/(40*L) - 19*L/336;
    3*L/28 - 81/(20*L), 567/(40*L) - 33*L/112, 39/(40*L) - 19*L/336, -8*L/21 - 111/(10*L)
]
m := 0 .. 3
K(x, L) := M(x, L)[1, 0]/M(x, L)[0, 0] → -(27*L/112 + 891/(40*L))/(27*L/14 + 162/(5*L))
G(x, L) := augment(M(x, L), M3(x, L))
Gauss(M) :=
    k ← 0
    i ← 0
    j ← 0
    for i ∈ 0 .. rows(M) - 1
        for j ∈ 0 .. cols(M) - 1
            A[i, j] ← M[i, j]
    i ← 0
    j ← 0
    for k ∈ 0 .. 1
        for i ∈ k + 1 .. rows(A) - 1
            c ← A[i, k]/A[k, k]
            A[i, k] ← 0
            for j ∈ k + 1 .. cols(A) - 1
                A[i, j] ← A[i, j] - c*A[k, j]
    A
Mfinal(x, L) := Gauss(G(x, L)) simplify → [
    -27*L/14 - 162/(5*L), 27*(5*L^2 + 462)/(560*L), 567/(40*L) - 33*L/112, 3*(5*L^2 - 189)/(140*L), 15*L/4;
    0, -243*(5*L^2 + 126)*(L^2 + 6)/(128*L*(5*L^2 + 84)), 9*(5*L^4 - 276*L^2 + 6804)/(128*L*(5*L^2 + 84)), 9*(177*L^2 - 5*L^4 + 3402)/(32*L*(5*L^2 + 84)), 135*L*(5*L^2 + 126)/(32*(5*L^2 + 84));
    0, 0, -(5*L^6/3 + 135*L^4 + 1728*L^2 + 2268)/(L*(5*L^2 + 126)*(L^2 + 6)), -(5*L^6 - 90*L^4 + 1944*L^2 - 27216)/(12*L*(5*L^2 + 126)*(L^2 + 6)), 5*L*(L^2 + 36)/(6*(L^2 + 6));
    0, 0, -(5*L^6 - 90*L^4 + 1944*L^2 - 27216)/(12*L*(5*L^2 + 126)*(L^2 + 6)), -(5*L^6/3 + 135*L^4 + 1728*L^2 + 2268)/(L*(5*L^2 + 126)*(L^2 + 6)), 5*L*(L^2 + 36)/(6*(L^2 + 6))
]
